*Heading
** Job name: Job-1 Model name: Pipe
** Generated by: Abaqus/CAE 2022
*Preprint, echo=NO, model=NO, history=NO, contact=NO
**
** PARTS
**
*Part, name=pipe
*Node
      1,           0.,   10.0773296,           0.
      2,           0.,  -10.0773296,           0.
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*Element, type=C3D8R
   1,  274,  927, 1971,  903,    1,   13,  423,  140
   2,  927,  928, 1972, 1971,   13,   14,  424,  423
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*Nset, nset=Set-1
    1,    2,    5,    8,    9,   10
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*Elset, elset=Set-1, generate
 1221,  2440,     1
*Nset, nset=Set-2
    1,    2,    3,    4,    5,    6
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*Elset, elset=Set-2, generate
    1,  1220,     1
*Nset, nset=Set-3
   9,  10, 285, 286, 287, 288
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*Elset, elset=Set-3, generate
 1465,  1525,     1
*Nset, nset=Set-5
   4,   7, 269, 270, 271
*Elset, elset=Set-5, generate
  245,  1160,   305
*Elset, elset=_Surf-1_S5, internal
  245,  246,  247,  248,  249,  250
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*Surface, type=ELEMENT, name=Surf-1
_Surf-1_S5, S5
*Elset, elset=_Surf-2_S5, internal
  245,  246,  247,  248,  249,  250
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*Surface, type=ELEMENT, name=Surf-2
_Surf-2_S5, S5
*Distribution, name=Ori-2-DiscOrient, location=ELEMENT, Table=Ori-2-DiscOrient_Table
** Description: Distribution generated from Discrete Orientation
,           1.,           0.,           0.,           0.,           1.,           0.
1,           1.,           0.,           0.,           0., 0.0257479101419449, -0.999668478965759
2,           1.,           0.,           0.,           0., 0.077175460755825, -0.997017502784729
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1220,           1.,           0.,           0.,           0., 0.02574791200459, 0.999668478965759
*Orientation, name=Ori-2, system=RECTANGULAR
Ori-2-DiscOrient
1, 0.
** Section: Section-2
*Solid Section, elset=Set-2, orientation=Ori-2, material=Carbon/Epoxy(a)
,
*Distribution, name=Ori-1-DiscOrient, location=ELEMENT, Table=Ori-1-DiscOrient_Table
** Description: Distribution generated from Discrete Orientation
,           1.,           0.,           0.,           0.,           1.,           0.
1221,           0., -0.02574791200459, -0.999668478965759,           1.,           0.,           0.
1222,           0., -0.077175460755825, -0.997017502784729,           1.,           0.,           0.
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2440,           0., -0.0257479138672352, 0.999668478965759,           1.,           0.,           0.
*Orientation, name=Ori-1, system=RECTANGULAR
Ori-1-DiscOrient
1, 0.
** Section: Section-1
*Solid Section, elset=Set-1, orientation=Ori-1, material=Carbon/Epoxy(a)
,
*End Part
**
**
** ASSEMBLY
**
*Assembly, name=Assembly
**
*Instance, name=pipe-1, part=pipe
*End Instance
**
*Node
      1,           0.,           0., -6.17058473e-16
*Node
      2,           2.,           0., 6.17058473e-16
*Node
      3,           0.,           0., -6.17058473e-16
*Node
      4,           0.,           0., -6.17058473e-16
*Nset, nset=Set-3, instance=pipe-1
    1,    2,    3,    4,    5,    6
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*Elset, elset=Set-3, instance=pipe-1
    1,   61,   62,  122,  123,  183
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*Nset, nset=Set-4, instance=pipe-1
    1,    2,    3,    4,    9,   10
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*Elset, elset=Set-4, instance=pipe-1
    1,    2,    3,    4,    5,    6
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*Nset, nset=Set-5, instance=pipe-1
   3,   6, 275, 276, 277
*Elset, elset=Set-5, instance=pipe-1, generate
  305,  1220,   305
*Nset, nset=Set-6
 2,
*Nset, nset=set-rp
 2,
*Nset, nset="set-x=L", instance=pipe-1
    5,    6,    7,    8,   11,   12
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*Elset, elset="set-x=L", instance=pipe-1
  916,  917,  918,  919,  920,  921
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*Elset, elset=_Surf-1_S5, internal, instance=pipe-1
  245,  246,  247,  248,  249,  250
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*Surface, type=ELEMENT, name=Surf-1
_Surf-1_S5, S5
** Constraint: Constraint-1
*Equation
2
"set-x=L", 1, 1.
set-rp, 1, -1.
*End Assembly
*Distribution Table, name=Ori-2-DiscOrient_Table
coord3D, coord3D
*Distribution Table, name=Ori-1-DiscOrient_Table
coord3D, coord3D
**
** MATERIALS
**
*Material, name=Carbon/Epoxy(a)
*Elastic, type=ENGINEERING CONSTANTS
130000.,10000.,10000.,  0.28,  0.28,   0.5, 4500., 4500.
 3500.,
**
** BOUNDARY CONDITIONS
**
** Name: BC-1 Type: Displacement/Rotation
*Boundary
Set-3, 3, 3
** Name: BC-2 Type: Displacement/Rotation
*Boundary
Set-4, 1, 1
** Name: BC-3 Type: Displacement/Rotation
*Boundary
Set-5, 2, 2
** ----------------------------------------------------------------
**
** STEP: Step-1
**
*Step, name=Step-1, nlgeom=NO
*Static
1., 1., 1e-05, 1.
**
** LOADS
**
** Name: Load-1   Type: Pressure
*Dsload
Surf-1, P, 100.
** Name: Load-2   Type: Concentrated force
*Cload
Set-6, 1, -24543.7
**
** OUTPUT REQUESTS
**
*Restart, write, frequency=0
**
** FIELD OUTPUT: F-Output-1
**
*Output, field, variable=PRESELECT
**
** HISTORY OUTPUT: H-Output-1
**
*Output, history, variable=PRESELECT
*End Step
