*Heading
** Job name: Job-1 Model name: Model-1
** Generated by: Abaqus/CAE 2022
*Preprint, echo=NO, model=NO, history=NO, contact=NO
**
** PARTS
**
*Part, name=Part-1
*Node
      1,          30.,        -1.25,          20.
      2,           0.,        -1.25,          20.
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*Element, type=C3D8R
 1,  148, 1041, 1069,  141,    1,  113,  126,    4
 2, 1041, 1042, 1070, 1069,  113,  114,  125,  126
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*Nset, nset=Set-1
    9,   10,   11,   12,   17,   18
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*Elset, elset=Set-1
  193,  194,  195,  196,  197,  198
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*Nset, nset=Set-2
    1,    2,    5,    8,    9,   10
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*Elset, elset=Set-2
   41,   42,   43,   44,   45,   46
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*Nset, nset=Set-3
    1,    2,    3,    4,    5,    6
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*Elset, elset=Set-3
    1,    2,    3,    4,    5,    6
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*Nset, nset=_PickedSet20, internal
  91,  95, 868, 869, 870, 871
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*Elset, elset=_PickedSet20, internal, generate
 2368,  2512,     8
*Nset, nset=_PickedSet23, internal
  81,  89, 818, 819, 820, 821
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*Elset, elset=_PickedSet23, internal, generate
 2169,  2313,     8
*Elset, elset=_Surf-1_S2, internal, generate
 2361,  2512,     1
*Surface, type=ELEMENT, name=Surf-1
_Surf-1_S2, S2
*Elset, elset=__PickedSurf22_S3, internal, generate
 2169,  2320,     1
*Surface, type=ELEMENT, name=_PickedSurf22, internal
__PickedSurf22_S3, S3
*Distribution, name=Ori-2-DiscOrient, location=ELEMENT, Table=Ori-2-DiscOrient_Table
** Description: Distribution generated from Discrete Orientation
,           1.,           0.,           0.,           0.,           1.,           0.
1,           0.,           0.,           1.,          -1.,           0.,           0.
2,           0.,           0.,           1.,          -1.,           0.,           0.
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2704,           0.,           0.,           1.,          -1.,           0.,           0.
*Orientation, name=Ori-2, system=RECTANGULAR
Ori-2-DiscOrient
1, 0.
** Section: top
*Solid Section, elset=Set-3, orientation=Ori-2, material=fiber
,
*Orientation, name=Ori-3
1., 0., 0., 0., 1., 0.
1, 0.
** Section: foam
*Solid Section, elset=Set-2, orientation=Ori-3, material=foam
,
*Distribution, name=Ori-1-DiscOrient, location=ELEMENT, Table=Ori-1-DiscOrient_Table
** Description: Distribution generated from Discrete Orientation
,           1.,           0.,           0.,           0.,           1.,           0.
193,           0.,           0.,           1.,           1.,           0.,           0.
194,           0.,           0.,           1.,           1.,           0.,           0.
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2920,           0.,           0.,           1.,           1.,           0.,           0.
*Orientation, name=Ori-1, system=RECTANGULAR
Ori-1-DiscOrient
1, 0.
** Section: top
*Solid Section, elset=Set-1, orientation=Ori-1, material=fiber
,
*End Part
**
*Part, name=roller
*End Part
**
**
** ASSEMBLY
**
*Assembly, name=Assembly
**
*Instance, name=Part-1-1, part=Part-1
*End Instance
**
*Instance, name=roller-1, part=roller
         15.,         -7.5,          25.
         15.,         -7.5,          25.,          15.,         -7.5, 26.0000000126881, 89.9999992730282
*Surface, type=REVOLUTION, name=Surf-18
START,           5.,          15.
 LINE,           5.,         -15.
*End Instance
**
*Instance, name=roller-2, part=roller
         15.,        16.75,         108.
         15.,        16.75,         108.,          15.,        16.75, 109.000000012688, 89.9999992730282
*Surface, type=REVOLUTION, name=m_Surf-5
START,           5.,          15.
 LINE,           5.,         -15.
*End Instance
**
*Instance, name=roller-3, part=roller
         15.,        16.75,         191.
         15.,        16.75,         191.,          15.,        16.75, 192.000000012688, 89.9999992730282
*Surface, type=REVOLUTION, name=m_Surf-3
START,           5.,          15.
 LINE,           5.,         -15.
*End Instance
**
*Instance, name=roller-4, part=roller
         15.,        -7.25,         275.
         15.,        -7.25,         275.,          15.,        -7.25, 276.000000012688, 89.9999992730282
*Surface, type=REVOLUTION, name=Surf-17
START,           5.,          15.
 LINE,           5.,         -15.
*End Instance
**
*Node
      1,         100.,           0.,         200.
*Node
      2,         100.,           0.,         200.
*Node
      3,         100.,           0.,         300.
*Node
      4,          30.,       -12.25,         275.
*Node
      5,          30.,        21.75,         191.
*Node
      6,          30.,        21.75,         108.
*Node
      7,          30.,        -12.5,          25.
*Nset, nset=Set-3
 3,
*Nset, nset=Set-8
 4,
*Nset, nset=Set-9
 7,
*Nset, nset=Set-10
 5,
*Nset, nset=Set-11
 6,
*Nset, nset=_PickedSet37, internal
 4,
*Nset, nset=_PickedSet42, internal
 5,
*Nset, nset=_PickedSet44, internal
 6,
*Nset, nset=_PickedSet46, internal
 7,
*Nset, nset=_PickedSet77, internal
 4,
*Nset, nset=_PickedSet78, internal
 7,
*Nset, nset=_PickedSet79, internal
 5,
*Nset, nset=_PickedSet80, internal
 6,
*Elset, elset=_s_Surf-1_S3, internal, instance=Part-1-1
 2633, 2634, 2635, 2636, 2637, 2638
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*Surface, type=ELEMENT, name=s_Surf-1
_s_Surf-1_S3, S3
*Elset, elset=_s_Surf-3_S2, internal, instance=Part-1-1, generate
 2353,  2512,     1
*Elset, elset=_s_Surf-3_S5, internal, instance=Part-1-1, generate
 2753,  2760,     1
*Surface, type=ELEMENT, name=s_Surf-3
_s_Surf-3_S2, S2
_s_Surf-3_S5, S5
*Elset, elset=_s_Surf-5_S5, internal, instance=Part-1-1, generate
 2905,  2912,     1
*Elset, elset=_s_Surf-5_S2, internal, instance=Part-1-1, generate
  873,  1024,     1
*Surface, type=ELEMENT, name=s_Surf-5
_s_Surf-5_S5, S5
_s_Surf-5_S2, S2
*Elset, elset=_s_Surf-7_S5, internal, instance=Part-1-1
   1,   2,   3,   4,   5,   6
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*Surface, type=ELEMENT, name=s_Surf-7
_s_Surf-7_S5, S5
*Elset, elset=_s_Surf-9_S3, internal, instance=Part-1-1
 1705, 1706, 1707, 1708, 1709, 1710, 1711, 1712, 2697, 2698, 2699, 2700, 2701, 2702, 2703, 2704
*Surface, type=ELEMENT, name=s_Surf-9
_s_Surf-9_S3, S3
*Elset, elset=_s_Surf-11_S2, internal, instance=Part-1-1, generate
 1673,  1680,     1
*Elset, elset=_s_Surf-11_S5, internal, instance=Part-1-1, generate
 2753,  2760,     1
*Surface, type=ELEMENT, name=s_Surf-11
_s_Surf-11_S2, S2
_s_Surf-11_S5, S5
*Elset, elset=_s_Surf-13_S5, internal, instance=Part-1-1, generate
 2905,  2912,     1
*Elset, elset=_s_Surf-13_S6, internal, instance=Part-1-1, generate
 1665,  1672,     1
*Surface, type=ELEMENT, name=s_Surf-13
_s_Surf-13_S5, S5
_s_Surf-13_S6, S6
*Elset, elset=_s_Surf-15_S3, internal, instance=Part-1-1, generate
 257,  264,    1
*Elset, elset=_s_Surf-15_S5, internal, instance=Part-1-1, generate
 161,  168,    1
*Surface, type=ELEMENT, name=s_Surf-15
_s_Surf-15_S3, S3
_s_Surf-15_S5, S5
*Elset, elset=__PickedSurf65_S3, internal, instance=Part-1-1
 1705, 1706, 1707, 1708, 1709, 1710
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*Surface, type=ELEMENT, name=_PickedSurf65, internal
__PickedSurf65_S3, S3
*Elset, elset=__PickedSurf67_S2, internal, instance=Part-1-1, generate
 1673,  1680,     1
*Elset, elset=__PickedSurf67_S5, internal, instance=Part-1-1, generate
 2753,  2760,     1
*Surface, type=ELEMENT, name=_PickedSurf67, internal
__PickedSurf67_S2, S2
__PickedSurf67_S5, S5
*Elset, elset=__PickedSurf69_S5, internal, instance=Part-1-1, generate
 2905,  2912,     1
*Elset, elset=__PickedSurf69_S6, internal, instance=Part-1-1, generate
 1665,  1672,     1
*Surface, type=ELEMENT, name=_PickedSurf69, internal
__PickedSurf69_S5, S5
__PickedSurf69_S6, S6
*Elset, elset=__PickedSurf71_S3, internal, instance=Part-1-1, generate
 257,  264,    1
*Elset, elset=__PickedSurf71_S5, internal, instance=Part-1-1, generate
 161,  168,    1
*Surface, type=ELEMENT, name=_PickedSurf71, internal
__PickedSurf71_S3, S3
__PickedSurf71_S5, S5
** Constraint: Constraint-3
*Rigid Body, ref node=_PickedSet37, analytical surface=roller-4.Surf-17
** Constraint: Constraint-4
*Rigid Body, ref node=_PickedSet42, analytical surface=roller-3.m_Surf-3
** Constraint: Constraint-5
*Rigid Body, ref node=_PickedSet44, analytical surface=roller-2.m_Surf-5
** Constraint: Constraint-6
*Rigid Body, ref node=_PickedSet46, analytical surface=roller-1.Surf-18
*End Assembly
*Distribution Table, name=Ori-2-DiscOrient_Table
coord3D, coord3D
*Distribution Table, name=Ori-1-DiscOrient_Table
coord3D, coord3D
**
** MATERIALS
**
*Material, name=fiber
*Elastic, type=ENGINEERING CONSTANTS
130000.,10000.,10000.,  0.28,  0.28,   0.5, 4500., 4500.
 3500.,
*Material, name=foam
*Elastic, type=ENGINEERING CONSTANTS
100., 100., 100.,  0.3,  0.3,  0.3, 38.5, 38.5
 38.5,
**
** INTERACTION PROPERTIES
**
*Surface Interaction, name=Contact-properties
1.,
**
** BOUNDARY CONDITIONS
**
** Name: BC-1 Type: Symmetry/Antisymmetry/Encastre
*Boundary
_PickedSet77, ENCASTRE
** Name: BC-2 Type: Symmetry/Antisymmetry/Encastre
*Boundary
_PickedSet78, ENCASTRE
** Name: BC-3 Type: Displacement/Rotation
*Boundary
_PickedSet79, 1, 1
_PickedSet79, 2, 2
_PickedSet79, 3, 3
_PickedSet79, 4, 4
_PickedSet79, 5, 5
_PickedSet79, 6, 6
** Name: BC-4 Type: Displacement/Rotation
*Boundary
_PickedSet80, 1, 1
_PickedSet80, 2, 2
_PickedSet80, 3, 3
_PickedSet80, 4, 4
_PickedSet80, 5, 5
_PickedSet80, 6, 6
**
** INTERACTIONS
**
** Interaction: Int-1
*Contact Pair, interaction=Contact-properties, type=SURFACE TO SURFACE
_PickedSurf65, roller-4.Surf-17
** Interaction: Int-2
*Contact Pair, interaction=Contact-properties, type=SURFACE TO SURFACE
_PickedSurf67, roller-3.m_Surf-3
** Interaction: Int-3
*Contact Pair, interaction=Contact-properties, type=SURFACE TO SURFACE
_PickedSurf69, roller-2.m_Surf-5
** Interaction: Int-4
*Contact Pair, interaction=Contact-properties, type=SURFACE TO SURFACE
_PickedSurf71, roller-1.Surf-18
** ----------------------------------------------------------------
**
** STEP: Step-1
**
*Step, name=Step-1, nlgeom=NO
*Static
1., 1., 1e-05, 1.
**
** BOUNDARY CONDITIONS
**
** Name: BC-3 Type: Displacement/Rotation
*Boundary
_PickedSet79, 2, 2, -10.
** Name: BC-4 Type: Displacement/Rotation
*Boundary
_PickedSet80, 2, 2, -10.
**
** OUTPUT REQUESTS
**
*Restart, write, frequency=0
**
** FIELD OUTPUT: F-Output-1
**
*Output, field, variable=PRESELECT
**
** HISTORY OUTPUT: H-Output-1
**
*Output, history, variable=PRESELECT
*End Step
