*Heading
** Job name: Job-3 Model name: BP-2
** Generated by: Abaqus/CAE 2022
*Preprint, echo=NO, model=NO, history=NO, contact=NO
**
** PARTS
**
*Part, name=Box
*Node
      1,       -59.75,       -37.25,   1159.90002
      2,  -20.0499992,       -37.25,   1159.90002
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*Element, type=S4R
1,    1,   49, 1269,   56
2,   49,    2,   50, 1269
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*Nset, nset=Set-2
   27,   29,   41,   47,  431,  432
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*Elset, elset=Set-2
  597,  598,  599,  600,  601,  602
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*Nset, nset=_PickedSet25, internal
   1,   4,   7,  31,  54,  55
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*Elset, elset=_PickedSet25, internal
    1,    3,    5,    7,    9,   13
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*Nset, nset=_PickedSet31, internal
    8,   10,   33,   46,  192,  193
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*Elset, elset=_PickedSet31, internal
  265,  266,  267,  268,  739,  740
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*Nset, nset=_PickedSet37, internal
   27,   29,   41,   47,  431,  432
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*Elset, elset=_PickedSet37, internal
  597,  598,  599,  600,  601,  602
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*Nset, nset=_PickedSet43, internal
   15,   16,   36,   45,  207,  208
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*Elset, elset=_PickedSet43, internal
  289,  290,  291,  292,  553,  555
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*Nset, nset=_PickedSet64, internal
   5,   6,   9,  32,  60,  61
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*Elset, elset=_PickedSet64, internal
   12,   16,   20,   24,   28,   32
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*Elset, elset=_top_, internal
  265,  266,  267,  268,  273,  274
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*Surface, type=ELEMENT, name=top
_top_,
*Elset, elset=_Surf-2_SPOS, internal
    1,    2,    3,    4,    5,    6
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*Surface, type=ELEMENT, name=Surf-2
_Surf-2_SPOS, SPOS
*Elset, elset=__PickedSurf30_SPOS, internal
    9,   10,   11,   12,   13,   14
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*Surface, type=ELEMENT, name=_PickedSurf30, internal
__PickedSurf30_SPOS, SPOS
*Elset, elset=__PickedSurf36_SPOS, internal
  565,  566,  567,  568,  569,  570
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*Surface, type=ELEMENT, name=_PickedSurf36, internal
__PickedSurf36_SPOS, SPOS
*Elset, elset=__PickedSurf42_SPOS, internal
  293,  294,  295,  296,  297,  298
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*Surface, type=ELEMENT, name=_PickedSurf42, internal
__PickedSurf42_SPOS, SPOS
*Elset, elset=__PickedSurf63_SPOS, internal
  265,  266,  267,  268,  273,  274
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*Surface, type=ELEMENT, name=_PickedSurf63, internal
__PickedSurf63_SPOS, SPOS
*Distribution, name=Ori-1-DiscOrient, location=ELEMENT, Table=Ori-1-DiscOrient_Table
** Description: Distribution generated from Discrete Orientation
,           1.,           0.,           0.,           0.,           1.,           0.
1,           0.,           0.,           1.,          -1.,           0.,           0.
2,           0.,           0.,           1.,          -1.,           0.,           0.
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2722,           0.,           0.,           1.,          -1.,           0.,           0.
*Distribution, name=Ori-2-DiscOrient, location=ELEMENT, Table=Ori-2-DiscOrient_Table
** Description: Distribution generated from Discrete Orientation
,           1.,           0.,           0.,           0.,           1.,           0.
9,           0.,           0.,          -1., 0.373536437749863, -0.927615523338318,           0.
10,           0.,           0.,          -1., 0.373536437749863, -0.927615523338318,           0.
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2846,           0.,           0.,          -1., 0.373536437749863, -0.927615523338318,           0.
*Distribution, name=Ori-3-DiscOrient, location=ELEMENT, Table=Ori-3-DiscOrient_Table
** Description: Distribution generated from Discrete Orientation
,           1.,           0.,           0.,           0.,           1.,           0.
565,           0.,           0.,           1., -0.373536437749863, -0.927615523338318,           0.
566,           0.,           0.,           1., -0.373536437749863, -0.927615523338318,           0.
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2594,           0.,           0.,           1., -0.373536437749863, -0.927615523338318,           0.
*Distribution, name=Ori-4-DiscOrient, location=ELEMENT, Table=Ori-4-DiscOrient_Table
** Description: Distribution generated from Discrete Orientation
,           1.,           0.,           0.,           0.,           1.,           0.
293,           0.,           0.,          -1.,           0.,          -1.,           0.
294,           0.,           0.,          -1.,           0.,          -1.,           0.
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2970,           0.,           0.,          -1.,           0.,          -1.,           0.
*Distribution, name=Ori-5-DiscOrient, location=ELEMENT, Table=Ori-5-DiscOrient_Table
** Description: Distribution generated from Discrete Orientation
,           1.,           0.,           0.,           0.,           1.,           0.
265,           0.,           0.,           1.,          -1.,           0.,           0.
266,           0.,           0.,           1.,          -1.,           0.,           0.
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2274,           0.,           0.,           1.,          -1.,           0.,           0.
*Orientation, name=Ori-1, system=RECTANGULAR
Ori-1-DiscOrient
3, 0.
** Region: (CompositeLayup-BOTTOM-1: Generated From Layup)
*Elset, elset=CompositeLayup-BOTTOM-1
    1,    2,    3,    4,    5,    6
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** Section: CompositeLayup-BOTTOM-1
*Shell Section, elset=CompositeLayup-BOTTOM-1, composite, orientation=Ori-1, layup=CompositeLayup-BOTTOM
0.25, 3, S-glass/Epoxy, 0., Ply-1
0.25, 3, S-glass/Epoxy, 90., Ply-2
0.25, 3, S-glass/Epoxy, 90., Ply-3
0.25, 3, S-glass/Epoxy, 0., Ply-4
*Orientation, name=Ori-2, system=RECTANGULAR
Ori-2-DiscOrient
3, 0.
** Region: (CompositeLayup-SIDE1-1: Generated From Layup)
*Elset, elset=CompositeLayup-SIDE1-1
    9,   10,   11,   12,   13,   14
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** Section: CompositeLayup-SIDE1-1
*Shell Section, elset=CompositeLayup-SIDE1-1, composite, orientation=Ori-2, layup=CompositeLayup-SIDE1
0.25, 3, S-glass/Epoxy, 45., Ply-1
0.25, 3, S-glass/Epoxy, -45., Ply-2
0.25, 3, S-glass/Epoxy, 45., Ply-3
0.25, 3, S-glass/Epoxy, -45., Ply-4
0.25, 3, S-glass/Epoxy, -45., Ply-5
0.25, 3, S-glass/Epoxy, 45., Ply-6
0.25, 3, S-glass/Epoxy, -45., Ply-7
0.25, 3, S-glass/Epoxy, 45., Ply-8
*Orientation, name=Ori-5, system=RECTANGULAR
Ori-5-DiscOrient
3, 0.
** Region: (CompositeLayup-TOP-1: Generated From Layup)
*Elset, elset=CompositeLayup-TOP-1
  265,  266,  267,  268,  273,  274
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** Section: CompositeLayup-TOP-1
*Shell Section, elset=CompositeLayup-TOP-1, composite, orientation=Ori-5, layup=CompositeLayup-TOP
0.25, 3, S-glass/Epoxy, 0., Ply-5
0.25, 3, S-glass/Epoxy, 90., Ply-6
0.25, 3, S-glass/Epoxy, 0., Ply-7
0.25, 3, S-glass/Epoxy, 90., Ply-8
0.25, 3, S-glass/Epoxy, 90., Ply-1
0.25, 3, S-glass/Epoxy, 0., Ply-2
0.25, 3, S-glass/Epoxy, 90., Ply-3
0.25, 3, S-glass/Epoxy, 0., Ply-4
*Orientation, name=Ori-4, system=RECTANGULAR
Ori-4-DiscOrient
3, 0.
** Region: (CompositeLayup-SPAR-1: Generated From Layup)
*Elset, elset=CompositeLayup-SPAR-1
  293,  294,  295,  296,  297,  298
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** Section: CompositeLayup-SPAR-1
*Shell Section, elset=CompositeLayup-SPAR-1, composite, orientation=Ori-4, layup=CompositeLayup-SPAR
0.25, 3, S-glass/Epoxy, 45., Ply-1
0.25, 3, S-glass/Epoxy, -45., Ply-2
0.25, 3, S-glass/Epoxy, 45., Ply-3
0.25, 3, S-glass/Epoxy, -45., Ply-4
0.25, 3, S-glass/Epoxy, -45., Ply-5
0.25, 3, S-glass/Epoxy, 45., Ply-6
0.25, 3, S-glass/Epoxy, -45., Ply-7
0.25, 3, S-glass/Epoxy, 45., Ply-8
*Orientation, name=Ori-3, system=RECTANGULAR
Ori-3-DiscOrient
3, 0.
** Region: (CompositeLayup-SIDE2-1: Generated From Layup)
*Elset, elset=CompositeLayup-SIDE2-1
  565,  566,  567,  568,  569,  570
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** Section: CompositeLayup-SIDE2-1
*Shell Section, elset=CompositeLayup-SIDE2-1, composite, orientation=Ori-3, layup=CompositeLayup-SIDE2
0.25, 3, S-glass/Epoxy, 45., Ply-1
0.25, 3, S-glass/Epoxy, -45., Ply-2
0.25, 3, S-glass/Epoxy, 45., Ply-3
0.25, 3, S-glass/Epoxy, -45., Ply-4
0.25, 3, S-glass/Epoxy, -45., Ply-5
0.25, 3, S-glass/Epoxy, 45., Ply-6
0.25, 3, S-glass/Epoxy, -45., Ply-7
0.25, 3, S-glass/Epoxy, 45., Ply-8
*End Part
**
**
** ASSEMBLY
**
*Assembly, name=Assembly
**
*Instance, name=Box, part=Box
          0.,           0.,           0.
          0.,           0.,           0., 0.577350269189626, 0.577350269189626, 0.577350269189626,         120.
*End Instance
**
*Node
      1,           0.,           0.,           0.
*Node
      2,        1800.,           0.,           0.
*Nset, nset=CONTACT-SURFACE, instance=Box
  13,  14,  17,  20,  23,  24, 201, 202, 203, 342, 343, 344, 350, 351, 352
*Elset, elset=CONTACT-SURFACE, instance=Box
 549, 550, 551, 552, 561, 562, 563, 564
*Nset, nset=EDGES1, instance=Box
    6,    7,   18,   19,   28,   29
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*Elset, elset=EDGES1, instance=Box
  261,  262,  263,  264,  545,  546
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*Nset, nset=EDGES2, instance=Box
   30,   31,   32,   33,   34,   35
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*Elset, elset=EDGES2, instance=Box
  737,  738,  769,  800,  921,  922
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*Nset, nset=RF1
 1,
*Nset, nset=RF2
 2,
*Surface, type=NODE, name=EDGES1_CNS_, internal
EDGES1, 1.
*Surface, type=NODE, name=EDGES2_CNS_, internal
EDGES2, 1.
** Constraint: Constraint-1
*MPC
BEAM, EDGES1, RF1
** Constraint: Constraint-2
*MPC
BEAM, EDGES2, RF2
*Nonstructural Mass, elset=CONTACT-SURFACE, units=TOTAL MASS
0.05,
*End Assembly
*Distribution Table, name=Ori-1-DiscOrient_Table
coord3D, coord3D
*Distribution Table, name=Ori-2-DiscOrient_Table
coord3D, coord3D
*Distribution Table, name=Ori-3-DiscOrient_Table
coord3D, coord3D
*Distribution Table, name=Ori-4-DiscOrient_Table
coord3D, coord3D
*Distribution Table, name=Ori-5-DiscOrient_Table
coord3D, coord3D
**
** MATERIALS
**
*Material, name=S-glass/Epoxy
*Density
 2e-09,
*Elastic, type=LAMINA
48000.,11000.,   0.3, 4200., 4200., 3600.
*Fail Stress
1300., 800.,  40., 140.,  70., -0.5,   0.
**
** BOUNDARY CONDITIONS
**
** Name: BC1 Type: Displacement/Rotation
*Boundary
RF1, 1, 1
RF1, 2, 2
RF1, 3, 3
RF1, 4, 4
RF1, 5, 5
RF1, 6, 6
** Name: BC2 Type: Displacement/Rotation
*Boundary
RF2, 1, 1
RF2, 2, 2
RF2, 3, 3
RF2, 4, 4
RF2, 5, 5
RF2, 6, 6
** ----------------------------------------------------------------
**
** STEP: Step-Buck
**
*Step, name=Step-Buck, nlgeom=NO, perturbation
*Buckle
2, , 4, 700
**
** BOUNDARY CONDITIONS
**
** Name: BC1 Type: Displacement/Rotation
*Boundary, op=NEW, load case=1
RF1, 1, 1
RF1, 2, 2
RF1, 3, 3
RF1, 4, 4
RF1, 6, 6
*Boundary, op=NEW, load case=2
RF1, 1, 1
RF1, 2, 2
RF1, 3, 3
RF1, 4, 4
RF1, 6, 6
** Name: BC2 Type: Displacement/Rotation
*Boundary, op=NEW, load case=1
RF2, 2, 2
RF2, 4, 4
RF2, 5, 5
RF2, 6, 6
*Boundary, op=NEW, load case=2
RF2, 2, 2
RF2, 4, 4
RF2, 5, 5
RF2, 6, 6
**
** LOADS
**
** Name: Load-1   Type: Gravity
*Dload, op=NEW
, GRAV, 9810., 0., 0., -1.
**
** OUTPUT REQUESTS
**
*Restart, write, frequency=0
**
** FIELD OUTPUT: F-Output-1
**
*Output, field, variable=PRESELECT
*End Step
** ----------------------------------------------------------------
**
** STEP: Step-Stat
**
*Step, name=Step-Stat, nlgeom=NO
*Static
1., 1., 1e-05, 1.
**
** BOUNDARY CONDITIONS
**
** Name: BC1 Type: Displacement/Rotation
*Boundary, op=NEW
RF1, 1, 1
RF1, 2, 2
RF1, 3, 3
RF1, 4, 4
RF1, 6, 6
** Name: BC2 Type: Displacement/Rotation
*Boundary, op=NEW
RF2, 2, 2
RF2, 4, 4
RF2, 5, 5
RF2, 6, 6
**
** LOADS
**
** Name: Load-2   Type: Gravity
*Dload, op=NEW
, GRAV, 9810., 0., 0., -1.
**
** OUTPUT REQUESTS
**
*Restart, write, frequency=0
**
** FIELD OUTPUT: fe_bottom
**
*Output, field
*Element Output, elset=Box.CompositeLayup-BOTTOM-1, directions=YES
1, 2, 3, 4, 5, 6, 7, 8, 9, 10, 11, 12
CFAILURE,
**
** FIELD OUTPUT: fe_side1
**
*Element Output, elset=Box.CompositeLayup-SIDE1-1, directions=YES
1, 2, 3, 4, 5, 6, 7, 8, 9, 10, 11, 12, 13, 14, 15, 16
CFAILURE,
*Element Output, elset=Box.CompositeLayup-SIDE1-1, directions=YES
17, 18, 19, 20, 21, 22, 23, 24
CFAILURE,
**
** FIELD OUTPUT: fe_side2
**
*Element Output, elset=Box.CompositeLayup-SIDE2-1, directions=YES
1, 2, 3, 4, 5, 6, 7, 8, 9, 10, 11, 12, 13, 14, 15, 16
CFAILURE,
*Element Output, elset=Box.CompositeLayup-SIDE2-1, directions=YES
17, 18, 19, 20, 21, 22, 23, 24
CFAILURE,
**
** FIELD OUTPUT: fe_spar
**
*Element Output, elset=Box.CompositeLayup-SPAR-1, directions=YES
1, 2, 3, 4, 5, 6, 7, 8, 9, 10, 11, 12, 13, 14, 15, 16
CFAILURE,
*Element Output, elset=Box.CompositeLayup-SPAR-1, directions=YES
17, 18, 19, 20, 21, 22, 23, 24
CFAILURE,
**
** FIELD OUTPUT: fe_top
**
*Element Output, elset=Box.CompositeLayup-TOP-1, directions=YES
1, 2, 3, 4, 5, 6, 7, 8, 9, 10, 11, 12, 13, 14, 15, 16
CFAILURE,
*Element Output, elset=Box.CompositeLayup-TOP-1, directions=YES
17, 18, 19, 20, 21, 22, 23, 24
CFAILURE,
**
** FIELD OUTPUT: F-Output-2
**
*Output, field, variable=PRESELECT
**
** HISTORY OUTPUT: H-Output-1
**
*Output, history, variable=PRESELECT
*End Step
