*Heading
** Job name: 3-point-test-shell Model name: 3-point-test-shell
** Generated by: Abaqus/CAE 2022
*Preprint, echo=NO, model=NO, history=NO, contact=NO
**
** PARTS
**
*Part, name=Specimen
*Node
      1,         210.,           0.,           0.
      2,         210.,          15.,           0.
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*Element, type=S4R
  1,   1,  16, 404, 127
  2,  16,  17, 405, 404
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*Orientation, name=Ori-1
          1.,           0.,           0.,           0.,           1.,           0.
3, 0.
** Region: (Layup1-1: Generated From Layup)
*Elset, elset=Layup1-1, generate
    1,  1760,     1
** Section: Layup1-1
*Shell Section, elset=Layup1-1, composite, orientation=Ori-1, layup=Layup1
1., 3, Carbon/Epoxy(a), 0., Ply-1
4., 3, H100, 0., Ply-2
4., 3, H100, 0., Ply-3
1., 3, Carbon/Epoxy(a), 0., Ply-4
*End Part
**
**
** ASSEMBLY
**
*Assembly, name=Assembly
**
*Instance, name=Specimen, part=Specimen
       -110.,         -15.,           0.
*End Instance
**
*Nset, nset=EDGES-LOADING, instance=Specimen
   3,   4,   6,  72,  73,  74
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*Elset, elset=EDGES-LOADING, instance=Specimen
  393,  394,  395,  396,  397,  398
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*Nset, nset=EDGES-SUPPORT, instance=Specimen
   1,   2,   5,   7,   8,   9
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*Elset, elset=EDGES-SUPPORT, instance=Specimen
    1,    2,    3,    4,    5,    6
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*Nset, nset=VERTICES-RB1, instance=Specimen
 4, 6
*Nset, nset=VERTICES-RB2, instance=Specimen
 3,
*End Assembly
**
** MATERIALS
**
*Material, name=Carbon/Epoxy(a)
*Density
 1.6e-09,
*Elastic, type=ENGINEERING CONSTANTS
130000.,10000.,10000.,  0.28,  0.28,   0.5, 4500., 4500.
 3500.,
*Material, name=H100
*Density
 1e-10,
*Elastic, type=ENGINEERING CONSTANTS
100., 100., 100.,  0.3,  0.3,  0.3, 38.5, 38.5
 38.5,
**
** BOUNDARY CONDITIONS
**
** Name: BC-LOADING Type: Displacement/Rotation
*Boundary
EDGES-LOADING, 3, 3
** Name: BC-RB1 Type: Displacement/Rotation
*Boundary
VERTICES-RB1, 1, 1
** Name: BC-RB2 Type: Displacement/Rotation
*Boundary
VERTICES-RB2, 2, 2
** Name: BC-SUPPORT Type: Displacement/Rotation
*Boundary
EDGES-SUPPORT, 3, 3
** ----------------------------------------------------------------
**
** STEP: Step-1
**
*Step, name=Step-1, nlgeom=YES
*Static
0.1, 1., 1e-05, 0.1
**
** BOUNDARY CONDITIONS
**
** Name: BC-LOADING Type: Displacement/Rotation
*Boundary
EDGES-LOADING, 3, 3, -10.
**
** OUTPUT REQUESTS
**
*Restart, write, frequency=0
**
** FIELD OUTPUT: F-Output-1
**
*Output, field, variable=PRESELECT
**
** HISTORY OUTPUT: H-Output-1
**
*Output, history, variable=PRESELECT
*End Step
