*Heading
** Job name: SW1 Model name: SW1
** Generated by: Abaqus/CAE 2022
*Preprint, echo=NO, model=NO, history=NO, contact=NO
**
** PARTS
**
*Part, name=Beam
*Node
      1,  -33.3333321,         -15.,           9.
      2,  -33.3333321,           0.,           9.
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*Element, type=C3D8R
   1,   234,  2495, 12035,  2303,     1,    73,  1855,   150
   2,  2495,  2496, 12036, 12035,    73,    74,  1856,  1855
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*Nset, nset=CELLS-BOT
     5,     6,     7,     8,    13,    14
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*Elset, elset=CELLS-BOT
 14641, 14642, 14643, 14644, 14645, 14646
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*Nset, nset=CELLS-CORE
     1,     2,     3,     4,     5,     6
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*Elset, elset=CELLS-CORE
     1,     2,     3,     4,     5,     6
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*Nset, nset=CELLS-TOP
     1,     2,     3,     4,     9,    10
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*Elset, elset=CELLS-TOP, generate
  5921,  14640,      1
*Nset, nset=EDGES-LONG
    1,    2,    3,    4,    5,    6
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*Elset, elset=EDGES-LONG
     1,     8,     9,    16,    17,    24
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*Nset, nset=EDGES-TRAN
    1,    2,    3,    4,    5,    6
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*Elset, elset=EDGES-TRAN
     1,     2,     3,     4,     5,     6
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*Nset, nset=EDGES-THIC
    1,    2,    3,    4,    5,    6
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*Elset, elset=EDGES-THIC
     1,     8,   257,   264,   265,   272
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*Nset, nset=EDGES-SUPPORT-1
   67,   68,   69, 1663, 1664, 1665
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*Elset, elset=EDGES-SUPPORT-1
 20057, 20058, 20059, 20060, 20061, 20062
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*Nset, nset=EDGES-SUPPORT-2
   59,   60,   64, 1485, 1486, 1487
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*Elset, elset=EDGES-SUPPORT-2
 16125, 16130, 16135, 16140, 16145, 16150
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*Nset, nset=EDGES-LOADING-1
   37,   38,   50,  855,  856,  857
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*Elset, elset=EDGES-LOADING-1
  6977,  6978,  6979,  6980,  6981,  6982
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*Nset, nset=EDGES-LOADING-2
   43,   44,   49,  988,  989,  990
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*Elset, elset=EDGES-LOADING-2
  8553,  8554,  8555,  8556,  8557,  8558
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*Nset, nset=VERTICES-RBX-1
 55, 66
*Nset, nset=VERTICES-RBY-1
 58,
*Nset, nset=VERTICES-RBX-2
 56, 65
*Nset, nset=VERTICES-RBY-2
 57,
*Orientation, name=Ori-3
1., 0., 0., 0., 1., 0.
1, 0.
** Section: Section-Foam
*Solid Section, elset=CELLS-CORE, orientation=Ori-3, material=Foam
,
*Orientation, name=Ori-2
1., 0., 0., 0., 1., 0.
1, 0.
** Section: Section-Skin
*Solid Section, elset=CELLS-TOP, orientation=Ori-2, material=FiberComposite
,
*Orientation, name=Ori-1
1., 0., 0., 0., 1., 0.
1, 0.
** Section: Section-Skin
*Solid Section, elset=CELLS-BOT, orientation=Ori-1, material=FiberComposite
,
*End Part
**
**
** ASSEMBLY
**
*Assembly, name=Assembly
**
*Instance, name=Beam, part=Beam
*End Instance
**
*End Assembly
**
** MATERIALS
**
*Material, name=FiberComposite
*Elastic, type=ENGINEERING CONSTANTS
130000.,10000.,10000.,  0.28,  0.28,   0.5, 4500., 4500.
 3500.,
*Material, name=Foam
*Elastic, type=ENGINEERING CONSTANTS
100., 100., 100.,  0.3,  0.3,  0.3, 38.5, 38.5
 38.5,
**
** BOUNDARY CONDITIONS
**
** Name: BC-LOADING-1 Type: Displacement/Rotation
*Boundary
Beam.EDGES-LOADING-1, 3, 3
** Name: BC-LOADING-2 Type: Displacement/Rotation
*Boundary
Beam.EDGES-LOADING-2, 3, 3
** Name: BC-RBX-1 Type: Displacement/Rotation
*Boundary
Beam.VERTICES-RBX-1, 1, 1
** Name: BC-RBX-2 Type: Displacement/Rotation
*Boundary
Beam.VERTICES-RBX-2, 1, 1
** Name: BC-RBY-1 Type: Displacement/Rotation
*Boundary
Beam.VERTICES-RBY-1, 2, 2
** Name: BC-RBY-2 Type: Displacement/Rotation
*Boundary
Beam.VERTICES-RBY-2, 2, 2
** Name: BC-SUPPORT-1 Type: Displacement/Rotation
*Boundary
Beam.EDGES-SUPPORT-1, 3, 3
** Name: BC-SUPPORT-2 Type: Displacement/Rotation
*Boundary
Beam.EDGES-SUPPORT-2, 3, 3
** ----------------------------------------------------------------
**
** STEP: Step-1
**
*Step, name=Step-1, nlgeom=NO
*Static
1., 1., 1e-05, 1.
**
** BOUNDARY CONDITIONS
**
** Name: BC-LOADING-1 Type: Displacement/Rotation
*Boundary
Beam.EDGES-LOADING-1, 3, 3, -10.
** Name: BC-LOADING-2 Type: Displacement/Rotation
*Boundary
Beam.EDGES-LOADING-2, 3, 3, -10.
**
** OUTPUT REQUESTS
**
*Restart, write, frequency=0
**
** FIELD OUTPUT: F-Output-1
**
*Output, field, variable=PRESELECT
**
** HISTORY OUTPUT: H-Output-1
**
*Output, history, variable=PRESELECT
*End Step
